# Electricity; at grid; generation mix - Finland

Dataset: openLCA process, unit process
Category: 22: Utilities / 2211: Electric Power Generation, Transmission and Distribution / International
Geography: Finland
Time period: 2025-01-01 to 2025-12-31
Allocation method: physical allocation
Data quality: US EPA - Process Pedigree Matrix (4;1)
Exchange data quality scheme: US EPA - Flow Pedigree Matrix
Generated by: ERG
Published in: ERG, International Electricity
restrictionsDescription: The underlying Ember Climate data is released under a Creative Commons Attribution Licence.
These U.S. LCI Database Project data ("Data") are provided by the National Laboratory of the Rockies ("NLR"), operated by the Alliance for Sustainable Energy, LLC ("Alliance") for the US Department of Energy ("DOE") under Contract No. DE-AC36-08GO28308. The United States Government (the "Government") retains and the user acknowledges that the Government retains a non-exclusive, paid-up, irrevocable, worldwide license to publish or reproduce the published form of these data, or allow others to do so, for Government purposes.
Access to and use of these Data shall impose the following obligations on the user, as set forth in this Agreement. The user is granted the right, without any fee or cost, to use, copy, modify, alter, enhance and distribute these Data for any purpose whatsoever, provided that this entire notice appears in all copies of the Data. Any modification, alteration or enhancement of these data shall be identified and documented by the user. Further, the user agrees to credit the DOE/NLR/Alliance in any publication that results from the use of these Data. The names DOE/NLR/Alliance, however, may not be used in any advertising or publicity to endorse or promote any products or commercial entities unless specific written permission is obtained from DOE/NLR/Alliance. The user also understands that DOE/NLR/Alliance is not obligated to provide the user with any support, consulting, training or assistance of any kind with regard to the use of these Data or to provide the user with any updates, revisions or new versions of these Data.
YOU AGREE TO INDEMNIFY THE GOVERNMENT AND DOE/NLR/ALLIANCE, AND ITS SUBSIDIARIES, AFFILIATES, OFFICERS, AGENTS, AND EMPLOYEES AGAINST ANY CLAIM OR DEMAND, INCLUDING REASONABLE ATTORNEYS' FEES, RELATED TO YOUR USE OF THESE DATA. THESE DATA ARE PROVIDED BY DOE/NLR/ALLIANCE "AS IS" AND ANY EXPRESS OR IMPLIED WARRANTIES, INCLUDING BUT NOT LIMITED TO, THE IMPLIED WARRANTIES OF MERCHANTABILITY AND FITNESS FOR A PARTICULAR PURPOSE ARE DISCLAIMED. IN NO EVENT SHALL THE GOVERNMENT OR DOE/NLR/ALLIANCE BE LIABLE FOR ANY SPECIAL, INDIRECT OR CONSEQUENTIAL DAMAGES OR ANY DAMAGES WHATSOEVER, INCLUDING BUT NOT LIMITED TO CLAIMS ASSOCIATED WITH THE LOSS OF DATA OR PROFITS, WHICH MAY RESULT FROM AN ACTION IN CONTRACT, NEGLIGENCE OR OTHER TORTIOUS CLAIM THAT ARISES OUT OF OR IN CONNECTION WITH THE ACCESS, USE OR PERFORMANCE OF THESE DATA.

## General comment
Electricity generation mixes by country, as sourced from Ember Climate, are linked to U.S. based generators and supply chains from the U.S. Electricity Baseline. These data represent an at-grid generation mix and do not account for transmission loss to end users.

## Technology
Generation technologies were mapped to those available in the U.S. Electricity Baseline.

## Geography
This process represents the generation mix of the entire region.

## Time period
This process reflects the generation mix of the region over the course of the entire year. It reflects the most recently available full year.

## Reference product
- Electricity, AC, 2300-7650 V: 1 MJ

## Inputs
- Electricity, AC, 2300-7650 V: 0.1256 MJ; data quality (2,1,4,1,1)
  Bioenergy
- Electricity, AC, 2300-7650 V: 0.0019 MJ; data quality (2,1,4,1,1)
  Coal
- Electricity, AC, 2300-7650 V: 0.0115 MJ; data quality (2,1,4,1,1)
  Gas
- Electricity, AC, 2300-7650 V: 0.1512 MJ; data quality (2,1,4,1,1)
  Hydro
- Electricity, AC, 2300-7650 V: 0.3988 MJ; data quality (2,1,4,1,1)
  Nuclear
- Electricity, AC, 2300-7650 V: 0.0231 MJ; data quality (2,1,4,2,1)
  Other Fossil
- Electricity, AC, 2300-7650 V: 0.0016 MJ; data quality (2,1,4,2,1)
  Other Renewables
- Electricity, AC, 2300-7650 V: 0.0119 MJ; data quality (2,1,4,1,1)
  Solar
- Electricity, AC, 2300-7650 V: 0.2744 MJ; data quality (2,1,4,1,1)
  Wind

## Inventory method
Attributional LCI method

## Modelling constants
Approaches to compile and estimate generation mixes for specific countries by Ember Climate are described in the linked Ember Climate Data Methodology source object.

## Completeness
This process contains no elementary flows. Generation mix of all technologies sums to 100%.

## Data selection
Data were retrieved for all available countries for the most recent data year.

## Data treatment
Generation by fuel subcategory were normalized to total generation for each country to generate resource shares.

## Data collection
Data from Ember Climate were accessed on August 7 2026.

## Sampling procedure
No uncertainty was assessed.

## Use advice
This process is intended to connect to electricity generation processes from the electricity baseline. It does not include transmission and distribution losses to end users; use the corresponding at-user process for that.

## Intended application
This process is intended for use with electricity flows from the U.S. Electricity Baseline as a country generation mix (at grid). The background electricity processes incorporate a range of flows that are characterized in several impact categories.

## Project
This dataset was developed by the Federal LCA Commons Data Curator Eastern Research Group, Inc. (ERG) under subcontract (SUB-2024-10066) to the National Laboratory of the Rockies under Department of Energy (DOE) Prime Contract No. DE-AC36-08GO28308. The work is funded by DOE's Advanced Materials & Manufacturing Technologies Office (AMMTO).

## Review Dependent internal review
Internal review of methods and metadata.

## Sources
- Ember Climate Yearly Electricity Data
- Ember Climate Data Methodology
