# Electricity; at user; generation mix - Saint Vincent and the Grenadines

Dataset: openLCA process, unit process
Category: 22: Utilities / 2211: Electric Power Generation, Transmission and Distribution / International
Geography: Saint Vincent and the Grenadines
Time period: 2024-01-01 to 2024-12-31
Allocation method: physical allocation
Data quality: US EPA - Process Pedigree Matrix (4;1)
Exchange data quality scheme: US EPA - Flow Pedigree Matrix
Generated by: ERG
Published in: ERG, International Electricity
restrictionsDescription: The underlying World Bank indicator 'Electric power transmission and distribution losses (% of output)' (EG.ELC.LOSS.ZS; IEA Statistics via World Bank, World Development Indicators) is released under a Creative Commons Attribution 4.0 International Licence (CC BY 4.0).
These U.S. LCI Database Project data ("Data") are provided by the National Laboratory of the Rockies ("NLR"), operated by the Alliance for Sustainable Energy, LLC ("Alliance") for the US Department of Energy ("DOE") under Contract No. DE-AC36-08GO28308. The United States Government (the "Government") retains and the user acknowledges that the Government retains a non-exclusive, paid-up, irrevocable, worldwide license to publish or reproduce the published form of these data, or allow others to do so, for Government purposes.
Access to and use of these Data shall impose the following obligations on the user, as set forth in this Agreement. The user is granted the right, without any fee or cost, to use, copy, modify, alter, enhance and distribute these Data for any purpose whatsoever, provided that this entire notice appears in all copies of the Data. Any modification, alteration or enhancement of these data shall be identified and documented by the user. Further, the user agrees to credit the DOE/NLR/Alliance in any publication that results from the use of these Data. The names DOE/NLR/Alliance, however, may not be used in any advertising or publicity to endorse or promote any products or commercial entities unless specific written permission is obtained from DOE/NLR/Alliance. The user also understands that DOE/NLR/Alliance is not obligated to provide the user with any support, consulting, training or assistance of any kind with regard to the use of these Data or to provide the user with any updates, revisions or new versions of these Data.
YOU AGREE TO INDEMNIFY THE GOVERNMENT AND DOE/NLR/ALLIANCE, AND ITS SUBSIDIARIES, AFFILIATES, OFFICERS, AGENTS, AND EMPLOYEES AGAINST ANY CLAIM OR DEMAND, INCLUDING REASONABLE ATTORNEYS' FEES, RELATED TO YOUR USE OF THESE DATA. THESE DATA ARE PROVIDED BY DOE/NLR/ALLIANCE "AS IS" AND ANY EXPRESS OR IMPLIED WARRANTIES, INCLUDING BUT NOT LIMITED TO, THE IMPLIED WARRANTIES OF MERCHANTABILITY AND FITNESS FOR A PARTICULAR PURPOSE ARE DISCLAIMED. IN NO EVENT SHALL THE GOVERNMENT OR DOE/NLR/ALLIANCE BE LIABLE FOR ANY SPECIAL, INDIRECT OR CONSEQUENTIAL DAMAGES OR ANY DAMAGES WHATSOEVER, INCLUDING BUT NOT LIMITED TO CLAIMS ASSOCIATED WITH THE LOSS OF DATA OR PROFITS, WHICH MAY RESULT FROM AN ACTION IN CONTRACT, NEGLIGENCE OR OTHER TORTIOUS CLAIM THAT ARISES OUT OF OR IN CONNECTION WITH THE ACCESS, USE OR PERFORMANCE OF THESE DATA.

## General comment
At-grid generation mix for Saint Vincent and the Grenadines (VCT), year 2024, grossed up by T&D loss as reported by the World Bank (0.1362) for geographic region Latin America & Caribbean (LCN) used as fallback due to lack of country specific data for 2024. Reference flow is U.S. Electricity, AC, 120 V proxy.

## Technology
Applies T&D loss to the country at-grid generation mix. No additional generation technology mapping.

## Geography
End use in Saint Vincent and the Grenadines. T&D loss factor is for World Bank region Latin America & Caribbean (LCN), not Saint Vincent and the Grenadines specifically.

## Time period
Process year follows World Bank T&D loss year 2024. Upstream at-grid mix year is 2024.

## Reference product
- Electricity, AC, 120 V: 1 MJ

## Inputs
- Electricity, AC, 2300-7650 V: 1.15767 MJ; data quality (2,1,5,1,1)

## Inventory method
Technosphere only: 1 MJ low voltage out; high voltage in from the country at-grid process at 1 / (1 - L).

## Modelling constants
L is the World Bank indicator 'Electric power transmission and distribution losses (% of output)' (EG.ELC.LOSS.ZS), expressed as a fraction of output. Amount on the high voltage input is 1 / (1 - L).

## Completeness
No elementary flows. Completeness of the generation mix is that of the upstream at-grid process; this process only adds T&D losses.

## Data selection
Latest transmission and distribution loss year less than or equal to the linked at-grid mix year. Geographic region fallback if no country series; omit if neither is available.

## Data treatment
Static loss factor applied as a gross-up. L = 0 is kept (amount = 1). L >= 1 is rejected.

## Data collection
The World Bank indicator 'Electric power transmission and distribution losses (% of output)' (EG.ELC.LOSS.ZS), from the World Development Indicators, was accessed on August 7 2026.

## Sampling procedure
No uncertainty was assessed.

## Use advice
Use for end-use electricity demand in Saint Vincent and the Grenadines. Low voltage reference is a U.S. 120 V proxy. Check description: loss factor is regional.

## Intended application
End-use (at user) electricity demand in the country, linked to the U.S. Electricity Baseline via the country at-grid mix and a U.S. 120 V low voltage proxy.

## Project
This dataset was developed by the Federal LCA Commons Data Curator Eastern Research Group, Inc. (ERG) under subcontract (SUB-2024-10066) to the National Laboratory of the Rockies under Department of Energy (DOE) Prime Contract No. DE-AC36-08GO28308. The work is funded by DOE's Advanced Materials & Manufacturing Technologies Office (AMMTO).

## Review Dependent internal review
details of review performed go here

## Sources
- World Bank electric power transmission and distribution losses
