# Electricity - WIND - US average

Dataset: openLCA process, unit process
Category: 22: Utilities/2211: Electric Power Generation, Transmission and Distribution/WIND
Geography: United States of America (the)
Time period: 2023-01-01 to 2023-12-31
Data quality: US EPA - Process Pedigree Matrix (2;4)
Exchange data quality scheme: US EPA - Flow Pedigree Matrix
Generated by: ERG
Published in: ERG, International Electricity
restrictionsDescription: These U.S. LCI Database Project data ("Data") are provided by the National Renewable Energy Laboratory ("NREL"), operated by the Alliance for Sustainable Energy, LLC ("Alliance") for the US Department of Energy ("DOE") under Contract No. DE-AC36-08GO28308. The United States Government (the "Government") retains and the user acknowledges that the Government retains a non-exclusive, paid-up, irrevocable, worldwide license to publish or reproduce the published form of these data, or allow others to do so, for Government purposes.
Access to and use of these Data shall impose the following obligations on the user, as set forth in this Agreement. The user is granted the right, without any fee or cost, to use, copy, modify, alter, enhance and distribute these Data for any purpose whatsoever, provided that this entire notice appears in all copies of the Data. Any modification, alteration or enhancement of these data shall be identified and documented by the user. Further, the user agrees to credit the DOE/NREL/Alliance in any publication that results from the use of these Data. The names DOE/NREL/Alliance, however, may not be used in any advertising or publicity to endorse or promote any products or commercial entities unless specific written permission is obtained from DOE/NREL/Alliance. The user also understands that DOE/NREL/Alliance is not obligated to provide the user with any support, consulting, training or assistance of any kind with regard to the use of these Data or to provide the user with any updates, revisions or new versions of these Data.
YOU AGREE TO INDEMNIFY THE GOVERNMENT AND DOE/NREL/ALLIANCE, AND ITS SUBSIDIARIES, AFFILIATES, OFFICERS, AGENTS, AND EMPLOYEES AGAINST ANY CLAIM OR DEMAND, INCLUDING REASONABLE ATTORNEYS' FEES, RELATED TO YOUR USE OF THESE DATA. THESE DATA ARE PROVIDED BY DOE/NREL/ALLIANCE "AS IS" AND ANY EXPRESS OR IMPLIED WARRANTIES, INCLUDING BUT NOT LIMITED TO, THE IMPLIED WARRANTIES OF MERCHANTABILITY AND FITNESS FOR A PARTICULAR PURPOSE ARE DISCLAIMED. IN NO EVENT SHALL THE GOVERNMENT OR DOE/NREL/ALLIANCE BE LIABLE FOR ANY SPECIAL, INDIRECT OR CONSEQUENTIAL DAMAGES OR ANY DAMAGES WHATSOEVER, INCLUDING BUT NOT LIMITED TO CLAIMS ASSOCIATED WITH THE LOSS OF DATA OR PROFITS, WHICH MAY RESULT FROM AN ACTION IN CONTRACT, NEGLIGENCE OR OTHER TORTIOUS CLAIM THAT ARISES OUT OF OR IN CONNECTION WITH THE ACCESS, USE OR PERFORMANCE OF THESE DATA.

## General comment
US-average resource process represented as a balancing-authority provider mix. Each input exchange links to a BA resource process and uses a normalized weight back-calculated from the process 'Electricity; at grid; consumption mix - US - US'.

## Technology
Technosphere mixer only: weighted providers of balancing-authority resource processes. No elementary flows.

## Geography
This process represents a US-average mix of balancing-authority resource processes for one fuel.

## Time period
This process represents the grid mix of the year modeled in the U.S. Electricity Baseline.

## Reference product
- Electricity, AC, 2300-7650 V: 1 MWh

## Inputs from technosphere
- Electricity, AC, 2300-7650 V: 0.246654 MWh; provider Electricity - WIND - Electric Reliability Council of Texas, Inc.
  Electric Reliability Council of Texas, Inc.
- Electricity, AC, 2300-7650 V: 0.234416 MWh; provider Electricity - WIND - Midcontinent Independent System Operator, Inc.
  Midcontinent Independent System Operator, Inc.
- Electricity, AC, 2300-7650 V: 0.219251 MWh; provider Electricity - WIND - Southwest Power Pool
  Southwest Power Pool
- Electricity, AC, 2300-7650 V: 0.0611011 MWh; provider Electricity - WIND - PJM Interconnection, LLC
  PJM Interconnection, LLC
- Electricity, AC, 2300-7650 V: 0.0371921 MWh; provider Electricity - WIND - California Independent System Operator
  California Independent System Operator
- Electricity, AC, 2300-7650 V: 0.0346293 MWh; provider Electricity - WIND - Public Service Company of Colorado
  Public Service Company of Colorado
- Electricity, AC, 2300-7650 V: 0.0210262 MWh; provider Electricity - WIND - PacifiCorp East
  PacifiCorp East
- Electricity, AC, 2300-7650 V: 0.0210117 MWh; provider Electricity - WIND - Public Service Company of New Mexico
  Public Service Company of New Mexico
- Electricity, AC, 2300-7650 V: 0.0186406 MWh; provider Electricity - WIND - Bonneville Power Administration
  Bonneville Power Administration
- Electricity, AC, 2300-7650 V: 0.0132829 MWh; provider Electricity - WIND - Avangrid Renewables, LLC
  Avangrid Renewables, LLC
- Electricity, AC, 2300-7650 V: 0.0117394 MWh; provider Electricity - WIND - New York Independent System Operator
  New York Independent System Operator
- Electricity, AC, 2300-7650 V: 0.0106171 MWh; provider Electricity - WIND - Puget Sound Energy, Inc.
  Puget Sound Energy, Inc.
- Electricity, AC, 2300-7650 V: 0.0101257 MWh; provider Electricity - WIND - Western Area Power Administration - Rocky Mountain Region
  Western Area Power Administration - Rocky Mountain Region
- Electricity, AC, 2300-7650 V: 0.0100102 MWh; provider Electricity - WIND - PacifiCorp West
  PacifiCorp West
- Electricity, AC, 2300-7650 V: 0.00820307 MWh; provider Electricity - WIND - ISO New England
  ISO New England
- Electricity, AC, 2300-7650 V: 0.00614795 MWh; provider Electricity - WIND - Idaho Power Company
  Idaho Power Company
- Electricity, AC, 2300-7650 V: 0.0052503 MWh; provider Electricity - WIND - Associated Electric Cooperative, Inc.
  Associated Electric Cooperative, Inc.
- Electricity, AC, 2300-7650 V: 0.00523348 MWh; provider Electricity - WIND - Portland General Electric Company
  Portland General Electric Company
- Electricity, AC, 2300-7650 V: 0.00403663 MWh; provider Electricity - WIND - Arizona Public Service Company
  Arizona Public Service Company
- Electricity, AC, 2300-7650 V: 0.00344301 MWh; provider Electricity - WIND - NorthWestern Corporation
  NorthWestern Corporation
- Electricity, AC, 2300-7650 V: 0.00261994 MWh; provider Electricity - WIND - Avista Corporation
  Avista Corporation
- Electricity, AC, 2300-7650 V: 0.00255631 MWh; provider Electricity - WIND - Western Area Power Administration - Desert Southwest Region
  Western Area Power Administration - Desert Southwest Region
- Electricity, AC, 2300-7650 V: 0.00254659 MWh; provider Electricity - WIND - Gridforce South
  Gridforce South
- Electricity, AC, 2300-7650 V: 0.00252014 MWh; provider Electricity - WIND - Los Angeles Department of Water and Power
  Los Angeles Department of Water and Power
- Electricity, AC, 2300-7650 V: 0.00204001 MWh; provider Electricity - WIND - Southwestern Power Administration
  Southwestern Power Administration
- Electricity, AC, 2300-7650 V: 0.00196055 MWh; provider Electricity - WIND - Tucson Electric Power
  Tucson Electric Power
- Electricity, AC, 2300-7650 V: 0.00116439 MWh; provider Electricity - WIND - NaturEner Wind Watch, LLC
  NaturEner Wind Watch, LLC
- Electricity, AC, 2300-7650 V: 0.000937188 MWh; provider Electricity - WIND - NaturEner Power Watch, LLC
  NaturEner Power Watch, LLC
- Electricity, AC, 2300-7650 V: 0.000804063 MWh; provider Electricity - WIND - Nevada Power Company
  Nevada Power Company
- Electricity, AC, 2300-7650 V: 0.000438543 MWh; provider Electricity - WIND - El Paso Electric Company
  El Paso Electric Company
- Electricity, AC, 2300-7650 V: 0.000245339 MWh; provider Electricity - WIND - Salt River Project Agricultural Improvement and Power District
  Salt River Project Agricultural Improvement and Power District
- Electricity, AC, 2300-7650 V: 0.000100863 MWh; provider Electricity - WIND - Western Area Power Administration - Upper Great Plains West
  Western Area Power Administration - Upper Great Plains West
- Electricity, AC, 2300-7650 V: 3.28235e-5 MWh; provider Electricity - WIND - Tennessee Valley Authority
  Tennessee Valley Authority
- Electricity, AC, 2300-7650 V: 2.17626e-5 MWh; provider Electricity - WIND - Duke Energy Progress East
  Duke Energy Progress East

## Inventory method
Not applicable; this process contains only technosphere flows.

## Modelling constants
Provider weights are contribution = US_BA_weight × BA_resource_fraction, normalized within the resource so BA providers sum to 1.

## Completeness
This process contains no elementary flows. Provider weights sum to 1.

## Data selection
Balancing-authority resource shares are taken from the US Electricity Baseline process 'Electricity; at grid; consumption mix - US - US'.

## Data treatment
BA contributions are normalized within each resource to form a US-average provider mix.

## Sampling procedure
No uncertainty was assessed.

## Use advice
Use as an estimated US-average fuel-resource provider where regional data are unknown. Emissions and other elementary flows come from the linked balancing-authority resource processes, not from this mixer.

## Intended application
US-average fuel-resource mixer for use with the U.S. Electricity Baseline.

## Project
This dataset was developed by the Federal LCA Commons Data Curator Eastern Research Group, Inc. (ERG) under subcontract (SUB-2024-10066) to the National Renewable Energy Laboratory under Department of Energy (DOE) Prime Contract No. DE-AC36-08GO28308. The work is funded by DOE's Advanced Materials & Manufacturing Technologies Office (AMMTO).
