# Electricity - SOLAR - US average

Dataset: openLCA process, unit process
Category: 22: Utilities/2211: Electric Power Generation, Transmission and Distribution/SOLAR
Geography: United States of America (the)
Time period: 2023-01-01 to 2023-12-31
Data quality: US EPA - Process Pedigree Matrix (2;4)
Exchange data quality scheme: US EPA - Flow Pedigree Matrix
Generated by: ERG
Published in: ERG, International Electricity
restrictionsDescription: These U.S. LCI Database Project data ("Data") are provided by the National Renewable Energy Laboratory ("NREL"), operated by the Alliance for Sustainable Energy, LLC ("Alliance") for the US Department of Energy ("DOE") under Contract No. DE-AC36-08GO28308. The United States Government (the "Government") retains and the user acknowledges that the Government retains a non-exclusive, paid-up, irrevocable, worldwide license to publish or reproduce the published form of these data, or allow others to do so, for Government purposes.
Access to and use of these Data shall impose the following obligations on the user, as set forth in this Agreement. The user is granted the right, without any fee or cost, to use, copy, modify, alter, enhance and distribute these Data for any purpose whatsoever, provided that this entire notice appears in all copies of the Data. Any modification, alteration or enhancement of these data shall be identified and documented by the user. Further, the user agrees to credit the DOE/NREL/Alliance in any publication that results from the use of these Data. The names DOE/NREL/Alliance, however, may not be used in any advertising or publicity to endorse or promote any products or commercial entities unless specific written permission is obtained from DOE/NREL/Alliance. The user also understands that DOE/NREL/Alliance is not obligated to provide the user with any support, consulting, training or assistance of any kind with regard to the use of these Data or to provide the user with any updates, revisions or new versions of these Data.
YOU AGREE TO INDEMNIFY THE GOVERNMENT AND DOE/NREL/ALLIANCE, AND ITS SUBSIDIARIES, AFFILIATES, OFFICERS, AGENTS, AND EMPLOYEES AGAINST ANY CLAIM OR DEMAND, INCLUDING REASONABLE ATTORNEYS' FEES, RELATED TO YOUR USE OF THESE DATA. THESE DATA ARE PROVIDED BY DOE/NREL/ALLIANCE "AS IS" AND ANY EXPRESS OR IMPLIED WARRANTIES, INCLUDING BUT NOT LIMITED TO, THE IMPLIED WARRANTIES OF MERCHANTABILITY AND FITNESS FOR A PARTICULAR PURPOSE ARE DISCLAIMED. IN NO EVENT SHALL THE GOVERNMENT OR DOE/NREL/ALLIANCE BE LIABLE FOR ANY SPECIAL, INDIRECT OR CONSEQUENTIAL DAMAGES OR ANY DAMAGES WHATSOEVER, INCLUDING BUT NOT LIMITED TO CLAIMS ASSOCIATED WITH THE LOSS OF DATA OR PROFITS, WHICH MAY RESULT FROM AN ACTION IN CONTRACT, NEGLIGENCE OR OTHER TORTIOUS CLAIM THAT ARISES OUT OF OR IN CONNECTION WITH THE ACCESS, USE OR PERFORMANCE OF THESE DATA.

## General comment
US-average resource process represented as a balancing-authority provider mix. Each input exchange links to a BA resource process and uses a normalized weight back-calculated from the process 'Electricity; at grid; consumption mix - US - US'.

## Technology
Technosphere mixer only: weighted providers of balancing-authority resource processes. No elementary flows.

## Geography
This process represents a US-average mix of balancing-authority resource processes for one fuel.

## Time period
This process represents the grid mix of the year modeled in the U.S. Electricity Baseline.

## Reference product
- Electricity, AC, 2300-7650 V: 1 MWh

## Inputs from technosphere
- Electricity, AC, 2300-7650 V: 0.252117 MWh; provider Electricity - SOLAR - California Independent System Operator
  California Independent System Operator
- Electricity, AC, 2300-7650 V: 0.153436 MWh; provider Electricity - SOLAR - Electric Reliability Council of Texas, Inc.
  Electric Reliability Council of Texas, Inc.
- Electricity, AC, 2300-7650 V: 0.0730793 MWh; provider Electricity - SOLAR - PJM Interconnection, LLC
  PJM Interconnection, LLC
- Electricity, AC, 2300-7650 V: 0.0556394 MWh; provider Electricity - SOLAR - Midcontinent Independent System Operator, Inc.
  Midcontinent Independent System Operator, Inc.
- Electricity, AC, 2300-7650 V: 0.0497345 MWh; provider Electricity - SOLAR - Florida Power & Light Co.
  Florida Power & Light Co.
- Electricity, AC, 2300-7650 V: 0.0458225 MWh; provider Electricity - SOLAR - Southern Company Services, Inc. - Trans
  Southern Company Services, Inc. - Trans
- Electricity, AC, 2300-7650 V: 0.0449752 MWh; provider Electricity - SOLAR - Nevada Power Company
  Nevada Power Company
- Electricity, AC, 2300-7650 V: 0.0274183 MWh; provider Electricity - SOLAR - Duke Energy Progress East
  Duke Energy Progress East
- Electricity, AC, 2300-7650 V: 0.0265366 MWh; provider Electricity - SOLAR - Los Angeles Department of Water and Power
  Los Angeles Department of Water and Power
- Electricity, AC, 2300-7650 V: 0.0237318 MWh; provider Electricity - SOLAR - Duke Energy Progress West
  Duke Energy Progress West
- Electricity, AC, 2300-7650 V: 0.0227167 MWh; provider Electricity - SOLAR - PacifiCorp East
  PacifiCorp East
- Electricity, AC, 2300-7650 V: 0.0217591 MWh; provider Electricity - SOLAR - ISO New England
  ISO New England
- Electricity, AC, 2300-7650 V: 0.0189187 MWh; provider Electricity - SOLAR - Public Service Company of Colorado
  Public Service Company of Colorado
- Electricity, AC, 2300-7650 V: 0.0179579 MWh; provider Electricity - SOLAR - Arizona Public Service Company
  Arizona Public Service Company
- Electricity, AC, 2300-7650 V: 0.0169846 MWh; provider Electricity - SOLAR - PacifiCorp West
  PacifiCorp West
- Electricity, AC, 2300-7650 V: 0.0166442 MWh; provider Electricity - SOLAR - Duke Energy Carolinas
  Duke Energy Carolinas
- Electricity, AC, 2300-7650 V: 0.0153802 MWh; provider Electricity - SOLAR - Duke Energy Florida, Inc.
  Duke Energy Florida, Inc.
- Electricity, AC, 2300-7650 V: 0.0120188 MWh; provider Electricity - SOLAR - New York Independent System Operator
  New York Independent System Operator
- Electricity, AC, 2300-7650 V: 0.0118004 MWh; provider Electricity - SOLAR - Dominion Energy South Carolina, Inc.
  Dominion Energy South Carolina, Inc.
- Electricity, AC, 2300-7650 V: 0.0107284 MWh; provider Electricity - SOLAR - Tampa Electric Company
  Tampa Electric Company
- Electricity, AC, 2300-7650 V: 0.0085132 MWh; provider Electricity - SOLAR - Public Service Company of New Mexico
  Public Service Company of New Mexico
- Electricity, AC, 2300-7650 V: 0.00826333 MWh; provider Electricity - SOLAR - Salt River Project Agricultural Improvement and Power District
  Salt River Project Agricultural Improvement and Power District
- Electricity, AC, 2300-7650 V: 0.00823624 MWh; provider Electricity - SOLAR - Idaho Power Company
  Idaho Power Company
- Electricity, AC, 2300-7650 V: 0.00784365 MWh; provider Electricity - SOLAR - Tennessee Valley Authority
  Tennessee Valley Authority
- Electricity, AC, 2300-7650 V: 0.00514696 MWh; provider Electricity - SOLAR - Southwest Power Pool
  Southwest Power Pool
- Electricity, AC, 2300-7650 V: 0.00512793 MWh; provider Electricity - SOLAR - Avangrid Renewables, LLC
  Avangrid Renewables, LLC
- Electricity, AC, 2300-7650 V: 0.0048569 MWh; provider Electricity - SOLAR - Tucson Electric Power
  Tucson Electric Power
- Electricity, AC, 2300-7650 V: 0.00478216 MWh; provider Electricity - SOLAR - Western Area Power Administration - Desert Southwest Region
  Western Area Power Administration - Desert Southwest Region
- Electricity, AC, 2300-7650 V: 0.00476928 MWh; provider Electricity - SOLAR - Imperial Irrigation District
  Imperial Irrigation District
- Electricity, AC, 2300-7650 V: 0.00444646 MWh; provider Electricity - SOLAR - El Paso Electric Company
  El Paso Electric Company
- Electricity, AC, 2300-7650 V: 0.0039224 MWh; provider Electricity - SOLAR - South Carolina Public Service Authority
  South Carolina Public Service Authority
- Electricity, AC, 2300-7650 V: 0.00327814 MWh; provider Electricity - SOLAR - Florida Municipal Power Pool
  Florida Municipal Power Pool
- Electricity, AC, 2300-7650 V: 0.00326985 MWh; provider Electricity - SOLAR - Balancing Authority of Northern California
  Balancing Authority of Northern California
- Electricity, AC, 2300-7650 V: 0.00284065 MWh; provider Electricity - SOLAR - Western Area Power Administration - Rocky Mountain Region
  Western Area Power Administration - Rocky Mountain Region
- Electricity, AC, 2300-7650 V: 0.00212109 MWh; provider Electricity - SOLAR - Portland General Electric Company
  Portland General Electric Company
- Electricity, AC, 2300-7650 V: 0.00140611 MWh; provider Electricity - SOLAR - NorthWestern Corporation
  NorthWestern Corporation
- Electricity, AC, 2300-7650 V: 0.00117482 MWh; provider Electricity - SOLAR - Bonneville Power Administration
  Bonneville Power Administration
- Electricity, AC, 2300-7650 V: 0.000649252 MWh; provider Electricity - SOLAR - City of Tallahassee
  City of Tallahassee
- Electricity, AC, 2300-7650 V: 0.000461039 MWh; provider Electricity - SOLAR - JEA
  JEA
- Electricity, AC, 2300-7650 V: 0.000364723 MWh; provider Electricity - SOLAR - Avista Corporation
  Avista Corporation
- Electricity, AC, 2300-7650 V: 0.000328317 MWh; provider Electricity - SOLAR - Puget Sound Energy, Inc.
  Puget Sound Energy, Inc.
- Electricity, AC, 2300-7650 V: 0.000320782 MWh; provider Electricity - SOLAR - Southeastern Power Administration
  Southeastern Power Administration
- Electricity, AC, 2300-7650 V: 0.000316138 MWh; provider Electricity - SOLAR - Seminole Electric Cooperative
  Seminole Electric Cooperative
- Electricity, AC, 2300-7650 V: 0.000117988 MWh; provider Electricity - SOLAR - Southwestern Power Administration
  Southwestern Power Administration
- Electricity, AC, 2300-7650 V: 2.84229e-5 MWh; provider Electricity - SOLAR - Gainesville Regional Utilities
  Gainesville Regional Utilities
- Electricity, AC, 2300-7650 V: 1.39657e-5 MWh; provider Electricity - SOLAR - Associated Electric Cooperative, Inc.
  Associated Electric Cooperative, Inc.

## Inventory method
Not applicable; this process contains only technosphere flows.

## Modelling constants
Provider weights are contribution = US_BA_weight × BA_resource_fraction, normalized within the resource so BA providers sum to 1.

## Completeness
This process contains no elementary flows. Provider weights sum to 1.

## Data selection
Balancing-authority resource shares are taken from the US Electricity Baseline process 'Electricity; at grid; consumption mix - US - US'.

## Data treatment
BA contributions are normalized within each resource to form a US-average provider mix.

## Sampling procedure
No uncertainty was assessed.

## Use advice
Use as an estimated US-average fuel-resource provider where regional data are unknown. Emissions and other elementary flows come from the linked balancing-authority resource processes, not from this mixer.

## Intended application
US-average fuel-resource mixer for use with the U.S. Electricity Baseline.

## Project
This dataset was developed by the Federal LCA Commons Data Curator Eastern Research Group, Inc. (ERG) under subcontract (SUB-2024-10066) to the National Renewable Energy Laboratory under Department of Energy (DOE) Prime Contract No. DE-AC36-08GO28308. The work is funded by DOE's Advanced Materials & Manufacturing Technologies Office (AMMTO).
