# Electricity - BIOMASS - US average

Dataset: openLCA process, unit process
Category: 22: Utilities/2211: Electric Power Generation, Transmission and Distribution/BIOMASS
Geography: United States of America (the)
Time period: 2023-01-01 to 2023-12-31
Data quality: US EPA - Process Pedigree Matrix (2;4)
Exchange data quality scheme: US EPA - Flow Pedigree Matrix
Generated by: ERG
Published in: ERG, International Electricity
restrictionsDescription: These U.S. LCI Database Project data ("Data") are provided by the National Renewable Energy Laboratory ("NREL"), operated by the Alliance for Sustainable Energy, LLC ("Alliance") for the US Department of Energy ("DOE") under Contract No. DE-AC36-08GO28308. The United States Government (the "Government") retains and the user acknowledges that the Government retains a non-exclusive, paid-up, irrevocable, worldwide license to publish or reproduce the published form of these data, or allow others to do so, for Government purposes.
Access to and use of these Data shall impose the following obligations on the user, as set forth in this Agreement. The user is granted the right, without any fee or cost, to use, copy, modify, alter, enhance and distribute these Data for any purpose whatsoever, provided that this entire notice appears in all copies of the Data. Any modification, alteration or enhancement of these data shall be identified and documented by the user. Further, the user agrees to credit the DOE/NREL/Alliance in any publication that results from the use of these Data. The names DOE/NREL/Alliance, however, may not be used in any advertising or publicity to endorse or promote any products or commercial entities unless specific written permission is obtained from DOE/NREL/Alliance. The user also understands that DOE/NREL/Alliance is not obligated to provide the user with any support, consulting, training or assistance of any kind with regard to the use of these Data or to provide the user with any updates, revisions or new versions of these Data.
YOU AGREE TO INDEMNIFY THE GOVERNMENT AND DOE/NREL/ALLIANCE, AND ITS SUBSIDIARIES, AFFILIATES, OFFICERS, AGENTS, AND EMPLOYEES AGAINST ANY CLAIM OR DEMAND, INCLUDING REASONABLE ATTORNEYS' FEES, RELATED TO YOUR USE OF THESE DATA. THESE DATA ARE PROVIDED BY DOE/NREL/ALLIANCE "AS IS" AND ANY EXPRESS OR IMPLIED WARRANTIES, INCLUDING BUT NOT LIMITED TO, THE IMPLIED WARRANTIES OF MERCHANTABILITY AND FITNESS FOR A PARTICULAR PURPOSE ARE DISCLAIMED. IN NO EVENT SHALL THE GOVERNMENT OR DOE/NREL/ALLIANCE BE LIABLE FOR ANY SPECIAL, INDIRECT OR CONSEQUENTIAL DAMAGES OR ANY DAMAGES WHATSOEVER, INCLUDING BUT NOT LIMITED TO CLAIMS ASSOCIATED WITH THE LOSS OF DATA OR PROFITS, WHICH MAY RESULT FROM AN ACTION IN CONTRACT, NEGLIGENCE OR OTHER TORTIOUS CLAIM THAT ARISES OUT OF OR IN CONNECTION WITH THE ACCESS, USE OR PERFORMANCE OF THESE DATA.

## General comment
US-average resource process represented as a balancing-authority provider mix. Each input exchange links to a BA resource process and uses a normalized weight back-calculated from the process 'Electricity; at grid; consumption mix - US - US'.

## Technology
Technosphere mixer only: weighted providers of balancing-authority resource processes. No elementary flows.

## Geography
This process represents a US-average mix of balancing-authority resource processes for one fuel.

## Time period
This process represents the grid mix of the year modeled in the U.S. Electricity Baseline.

## Reference product
- Electricity, AC, 2300-7650 V: 1 MWh

## Inputs from technosphere
- Electricity, AC, 2300-7650 V: 0.162694 MWh; provider Electricity - BIOMASS - California Independent System Operator
  California Independent System Operator
- Electricity, AC, 2300-7650 V: 0.161256 MWh; provider Electricity - BIOMASS - PJM Interconnection, LLC
  PJM Interconnection, LLC
- Electricity, AC, 2300-7650 V: 0.140933 MWh; provider Electricity - BIOMASS - ISO New England
  ISO New England
- Electricity, AC, 2300-7650 V: 0.128979 MWh; provider Electricity - BIOMASS - Midcontinent Independent System Operator, Inc.
  Midcontinent Independent System Operator, Inc.
- Electricity, AC, 2300-7650 V: 0.0843004 MWh; provider Electricity - BIOMASS - Southern Company Services, Inc. - Trans
  Southern Company Services, Inc. - Trans
- Electricity, AC, 2300-7650 V: 0.0437986 MWh; provider Electricity - BIOMASS - New York Independent System Operator
  New York Independent System Operator
- Electricity, AC, 2300-7650 V: 0.0371261 MWh; provider Electricity - BIOMASS - Avista Corporation
  Avista Corporation
- Electricity, AC, 2300-7650 V: 0.0350376 MWh; provider Electricity - BIOMASS - PacifiCorp West
  PacifiCorp West
- Electricity, AC, 2300-7650 V: 0.0339089 MWh; provider Electricity - BIOMASS - Arizona Public Service Company
  Arizona Public Service Company
- Electricity, AC, 2300-7650 V: 0.0292559 MWh; provider Electricity - BIOMASS - South Carolina Public Service Authority
  South Carolina Public Service Authority
- Electricity, AC, 2300-7650 V: 0.0256903 MWh; provider Electricity - BIOMASS - Gainesville Regional Utilities
  Gainesville Regional Utilities
- Electricity, AC, 2300-7650 V: 0.0241859 MWh; provider Electricity - BIOMASS - Electric Reliability Council of Texas, Inc.
  Electric Reliability Council of Texas, Inc.
- Electricity, AC, 2300-7650 V: 0.0124748 MWh; provider Electricity - BIOMASS - Bonneville Power Administration
  Bonneville Power Administration
- Electricity, AC, 2300-7650 V: 0.0115778 MWh; provider Electricity - BIOMASS - Imperial Irrigation District
  Imperial Irrigation District
- Electricity, AC, 2300-7650 V: 0.0105519 MWh; provider Electricity - BIOMASS - Duke Energy Carolinas
  Duke Energy Carolinas
- Electricity, AC, 2300-7650 V: 0.00854642 MWh; provider Electricity - BIOMASS - Florida Power & Light Co.
  Florida Power & Light Co.
- Electricity, AC, 2300-7650 V: 0.00786069 MWh; provider Electricity - BIOMASS - Duke Energy Progress East
  Duke Energy Progress East
- Electricity, AC, 2300-7650 V: 0.00751876 MWh; provider Electricity - BIOMASS - Southwest Power Pool
  Southwest Power Pool
- Electricity, AC, 2300-7650 V: 0.00553766 MWh; provider Electricity - BIOMASS - Public Service Company of Colorado
  Public Service Company of Colorado
- Electricity, AC, 2300-7650 V: 0.0048972 MWh; provider Electricity - BIOMASS - Tennessee Valley Authority
  Tennessee Valley Authority
- Electricity, AC, 2300-7650 V: 0.00381906 MWh; provider Electricity - BIOMASS - Nevada Power Company
  Nevada Power Company
- Electricity, AC, 2300-7650 V: 0.00373842 MWh; provider Electricity - BIOMASS - PacifiCorp East
  PacifiCorp East
- Electricity, AC, 2300-7650 V: 0.00368708 MWh; provider Electricity - BIOMASS - Puget Sound Energy, Inc.
  Puget Sound Energy, Inc.
- Electricity, AC, 2300-7650 V: 0.00359348 MWh; provider Electricity - BIOMASS - Duke Energy Florida, Inc.
  Duke Energy Florida, Inc.
- Electricity, AC, 2300-7650 V: 0.0029169 MWh; provider Electricity - BIOMASS - Idaho Power Company
  Idaho Power Company
- Electricity, AC, 2300-7650 V: 0.00204773 MWh; provider Electricity - BIOMASS - JEA
  JEA
- Electricity, AC, 2300-7650 V: 0.00135189 MWh; provider Electricity - BIOMASS - El Paso Electric Company
  El Paso Electric Company
- Electricity, AC, 2300-7650 V: 0.000858683 MWh; provider Electricity - BIOMASS - Associated Electric Cooperative, Inc.
  Associated Electric Cooperative, Inc.
- Electricity, AC, 2300-7650 V: 0.000634464 MWh; provider Electricity - BIOMASS - Western Area Power Administration - Rocky Mountain Region
  Western Area Power Administration - Rocky Mountain Region
- Electricity, AC, 2300-7650 V: 0.000578696 MWh; provider Electricity - BIOMASS - Los Angeles Department of Water and Power
  Los Angeles Department of Water and Power
- Electricity, AC, 2300-7650 V: 0.00054119 MWh; provider Electricity - BIOMASS - Seminole Electric Cooperative
  Seminole Electric Cooperative
- Electricity, AC, 2300-7650 V: 0.000100802 MWh; provider Electricity - BIOMASS - Louisville Gas and Electric Company and Kentucky Utilities Company
  Louisville Gas and Electric Company and Kentucky Utilities Company

## Inventory method
Not applicable; this process contains only technosphere flows.

## Modelling constants
Provider weights are contribution = US_BA_weight × BA_resource_fraction, normalized within the resource so BA providers sum to 1.

## Completeness
This process contains no elementary flows. Provider weights sum to 1.

## Data selection
Balancing-authority resource shares are taken from the US Electricity Baseline process 'Electricity; at grid; consumption mix - US - US'.

## Data treatment
BA contributions are normalized within each resource to form a US-average provider mix.

## Sampling procedure
No uncertainty was assessed.

## Use advice
Use as an estimated US-average fuel-resource provider where regional data are unknown. Emissions and other elementary flows come from the linked balancing-authority resource processes, not from this mixer.

## Intended application
US-average fuel-resource mixer for use with the U.S. Electricity Baseline.

## Project
This dataset was developed by the Federal LCA Commons Data Curator Eastern Research Group, Inc. (ERG) under subcontract (SUB-2024-10066) to the National Renewable Energy Laboratory under Department of Energy (DOE) Prime Contract No. DE-AC36-08GO28308. The work is funded by DOE's Advanced Materials & Manufacturing Technologies Office (AMMTO).
