# Electricity - NUCLEAR - US average

Dataset: openLCA process, unit process
Category: 22: Utilities/2211: Electric Power Generation, Transmission and Distribution/NUCLEAR
Geography: United States of America (the)
Time period: 2023-01-01 to 2023-12-31
Data quality: US EPA - Process Pedigree Matrix (2;4)
Exchange data quality scheme: US EPA - Flow Pedigree Matrix
Generated by: ERG
Published in: ERG, International Electricity
restrictionsDescription: These U.S. LCI Database Project data ("Data") are provided by the National Renewable Energy Laboratory ("NREL"), operated by the Alliance for Sustainable Energy, LLC ("Alliance") for the US Department of Energy ("DOE") under Contract No. DE-AC36-08GO28308. The United States Government (the "Government") retains and the user acknowledges that the Government retains a non-exclusive, paid-up, irrevocable, worldwide license to publish or reproduce the published form of these data, or allow others to do so, for Government purposes.
Access to and use of these Data shall impose the following obligations on the user, as set forth in this Agreement. The user is granted the right, without any fee or cost, to use, copy, modify, alter, enhance and distribute these Data for any purpose whatsoever, provided that this entire notice appears in all copies of the Data. Any modification, alteration or enhancement of these data shall be identified and documented by the user. Further, the user agrees to credit the DOE/NREL/Alliance in any publication that results from the use of these Data. The names DOE/NREL/Alliance, however, may not be used in any advertising or publicity to endorse or promote any products or commercial entities unless specific written permission is obtained from DOE/NREL/Alliance. The user also understands that DOE/NREL/Alliance is not obligated to provide the user with any support, consulting, training or assistance of any kind with regard to the use of these Data or to provide the user with any updates, revisions or new versions of these Data.
YOU AGREE TO INDEMNIFY THE GOVERNMENT AND DOE/NREL/ALLIANCE, AND ITS SUBSIDIARIES, AFFILIATES, OFFICERS, AGENTS, AND EMPLOYEES AGAINST ANY CLAIM OR DEMAND, INCLUDING REASONABLE ATTORNEYS' FEES, RELATED TO YOUR USE OF THESE DATA. THESE DATA ARE PROVIDED BY DOE/NREL/ALLIANCE "AS IS" AND ANY EXPRESS OR IMPLIED WARRANTIES, INCLUDING BUT NOT LIMITED TO, THE IMPLIED WARRANTIES OF MERCHANTABILITY AND FITNESS FOR A PARTICULAR PURPOSE ARE DISCLAIMED. IN NO EVENT SHALL THE GOVERNMENT OR DOE/NREL/ALLIANCE BE LIABLE FOR ANY SPECIAL, INDIRECT OR CONSEQUENTIAL DAMAGES OR ANY DAMAGES WHATSOEVER, INCLUDING BUT NOT LIMITED TO CLAIMS ASSOCIATED WITH THE LOSS OF DATA OR PROFITS, WHICH MAY RESULT FROM AN ACTION IN CONTRACT, NEGLIGENCE OR OTHER TORTIOUS CLAIM THAT ARISES OUT OF OR IN CONNECTION WITH THE ACCESS, USE OR PERFORMANCE OF THESE DATA.

## General comment
US-average resource process represented as a balancing-authority provider mix. Each input exchange links to a BA resource process and uses a normalized weight back-calculated from the process 'Electricity; at grid; consumption mix - US - US'.

## Technology
Technosphere mixer only: weighted providers of balancing-authority resource processes. No elementary flows.

## Geography
This process represents a US-average mix of balancing-authority resource processes for one fuel.

## Time period
This process represents the grid mix of the year modeled in the U.S. Electricity Baseline.

## Reference product
- Electricity, AC, 2300-7650 V: 1 MWh

## Inputs from technosphere
- Electricity, AC, 2300-7650 V: 0.345486 MWh; provider Electricity - NUCLEAR - PJM Interconnection, LLC
  PJM Interconnection, LLC
- Electricity, AC, 2300-7650 V: 0.130316 MWh; provider Electricity - NUCLEAR - Midcontinent Independent System Operator, Inc.
  Midcontinent Independent System Operator, Inc.
- Electricity, AC, 2300-7650 V: 0.0818963 MWh; provider Electricity - NUCLEAR - Tennessee Valley Authority
  Tennessee Valley Authority
- Electricity, AC, 2300-7650 V: 0.0711469 MWh; provider Electricity - NUCLEAR - Duke Energy Carolinas
  Duke Energy Carolinas
- Electricity, AC, 2300-7650 V: 0.0647061 MWh; provider Electricity - NUCLEAR - Southern Company Services, Inc. - Trans
  Southern Company Services, Inc. - Trans
- Electricity, AC, 2300-7650 V: 0.054493 MWh; provider Electricity - NUCLEAR - Electric Reliability Council of Texas, Inc.
  Electric Reliability Council of Texas, Inc.
- Electricity, AC, 2300-7650 V: 0.0407864 MWh; provider Electricity - NUCLEAR - Salt River Project Agricultural Improvement and Power District
  Salt River Project Agricultural Improvement and Power District
- Electricity, AC, 2300-7650 V: 0.0404717 MWh; provider Electricity - NUCLEAR - Duke Energy Progress East
  Duke Energy Progress East
- Electricity, AC, 2300-7650 V: 0.0398707 MWh; provider Electricity - NUCLEAR - New York Independent System Operator
  New York Independent System Operator
- Electricity, AC, 2300-7650 V: 0.0338062 MWh; provider Electricity - NUCLEAR - ISO New England
  ISO New England
- Electricity, AC, 2300-7650 V: 0.0278378 MWh; provider Electricity - NUCLEAR - California Independent System Operator
  California Independent System Operator
- Electricity, AC, 2300-7650 V: 0.0228807 MWh; provider Electricity - NUCLEAR - Florida Power & Light Co.
  Florida Power & Light Co.
- Electricity, AC, 2300-7650 V: 0.0217709 MWh; provider Electricity - NUCLEAR - Southwest Power Pool
  Southwest Power Pool
- Electricity, AC, 2300-7650 V: 0.0127166 MWh; provider Electricity - NUCLEAR - Bonneville Power Administration
  Bonneville Power Administration
- Electricity, AC, 2300-7650 V: 0.0118148 MWh; provider Electricity - NUCLEAR - Dominion Energy South Carolina, Inc.
  Dominion Energy South Carolina, Inc.

## Inventory method
Not applicable; this process contains only technosphere flows.

## Modelling constants
Provider weights are contribution = US_BA_weight × BA_resource_fraction, normalized within the resource so BA providers sum to 1.

## Completeness
This process contains no elementary flows. Provider weights sum to 1.

## Data selection
Balancing-authority resource shares are taken from the US Electricity Baseline process 'Electricity; at grid; consumption mix - US - US'.

## Data treatment
BA contributions are normalized within each resource to form a US-average provider mix.

## Sampling procedure
No uncertainty was assessed.

## Use advice
Use as an estimated US-average fuel-resource provider where regional data are unknown. Emissions and other elementary flows come from the linked balancing-authority resource processes, not from this mixer.

## Intended application
US-average fuel-resource mixer for use with the U.S. Electricity Baseline.

## Project
This dataset was developed by the Federal LCA Commons Data Curator Eastern Research Group, Inc. (ERG) under subcontract (SUB-2024-10066) to the National Renewable Energy Laboratory under Department of Energy (DOE) Prime Contract No. DE-AC36-08GO28308. The work is funded by DOE's Advanced Materials & Manufacturing Technologies Office (AMMTO).
