# Electricity - HYDRO - US average

Dataset: openLCA process, unit process
Category: 22: Utilities/2211: Electric Power Generation, Transmission and Distribution/HYDRO
Geography: United States of America (the)
Time period: 2023-01-01 to 2023-12-31
Data quality: US EPA - Process Pedigree Matrix (2;4)
Exchange data quality scheme: US EPA - Flow Pedigree Matrix
Generated by: ERG
Published in: ERG, International Electricity
restrictionsDescription: These U.S. LCI Database Project data ("Data") are provided by the National Renewable Energy Laboratory ("NREL"), operated by the Alliance for Sustainable Energy, LLC ("Alliance") for the US Department of Energy ("DOE") under Contract No. DE-AC36-08GO28308. The United States Government (the "Government") retains and the user acknowledges that the Government retains a non-exclusive, paid-up, irrevocable, worldwide license to publish or reproduce the published form of these data, or allow others to do so, for Government purposes.
Access to and use of these Data shall impose the following obligations on the user, as set forth in this Agreement. The user is granted the right, without any fee or cost, to use, copy, modify, alter, enhance and distribute these Data for any purpose whatsoever, provided that this entire notice appears in all copies of the Data. Any modification, alteration or enhancement of these data shall be identified and documented by the user. Further, the user agrees to credit the DOE/NREL/Alliance in any publication that results from the use of these Data. The names DOE/NREL/Alliance, however, may not be used in any advertising or publicity to endorse or promote any products or commercial entities unless specific written permission is obtained from DOE/NREL/Alliance. The user also understands that DOE/NREL/Alliance is not obligated to provide the user with any support, consulting, training or assistance of any kind with regard to the use of these Data or to provide the user with any updates, revisions or new versions of these Data.
YOU AGREE TO INDEMNIFY THE GOVERNMENT AND DOE/NREL/ALLIANCE, AND ITS SUBSIDIARIES, AFFILIATES, OFFICERS, AGENTS, AND EMPLOYEES AGAINST ANY CLAIM OR DEMAND, INCLUDING REASONABLE ATTORNEYS' FEES, RELATED TO YOUR USE OF THESE DATA. THESE DATA ARE PROVIDED BY DOE/NREL/ALLIANCE "AS IS" AND ANY EXPRESS OR IMPLIED WARRANTIES, INCLUDING BUT NOT LIMITED TO, THE IMPLIED WARRANTIES OF MERCHANTABILITY AND FITNESS FOR A PARTICULAR PURPOSE ARE DISCLAIMED. IN NO EVENT SHALL THE GOVERNMENT OR DOE/NREL/ALLIANCE BE LIABLE FOR ANY SPECIAL, INDIRECT OR CONSEQUENTIAL DAMAGES OR ANY DAMAGES WHATSOEVER, INCLUDING BUT NOT LIMITED TO CLAIMS ASSOCIATED WITH THE LOSS OF DATA OR PROFITS, WHICH MAY RESULT FROM AN ACTION IN CONTRACT, NEGLIGENCE OR OTHER TORTIOUS CLAIM THAT ARISES OUT OF OR IN CONNECTION WITH THE ACCESS, USE OR PERFORMANCE OF THESE DATA.

## General comment
US-average resource process represented as a balancing-authority provider mix. Each input exchange links to a BA resource process and uses a normalized weight back-calculated from the process 'Electricity; at grid; consumption mix - US - US'.

## Technology
Technosphere mixer only: weighted providers of balancing-authority resource processes. No elementary flows.

## Geography
This process represents a US-average mix of balancing-authority resource processes for one fuel.

## Time period
This process represents the grid mix of the year modeled in the U.S. Electricity Baseline.

## Reference product
- Electricity, AC, 2300-7650 V: 1 MWh

## Inputs from technosphere
- Electricity, AC, 2300-7650 V: 0.23954 MWh; provider Electricity - HYDRO - Bonneville Power Administration
  Bonneville Power Administration
- Electricity, AC, 2300-7650 V: 0.107058 MWh; provider Electricity - HYDRO - New York Independent System Operator
  New York Independent System Operator
- Electricity, AC, 2300-7650 V: 0.0987266 MWh; provider Electricity - HYDRO - California Independent System Operator
  California Independent System Operator
- Electricity, AC, 2300-7650 V: 0.0484118 MWh; provider Electricity - HYDRO - Tennessee Valley Authority
  Tennessee Valley Authority
- Electricity, AC, 2300-7650 V: 0.0398726 MWh; provider Electricity - HYDRO - PacifiCorp West
  PacifiCorp West
- Electricity, AC, 2300-7650 V: 0.0391874 MWh; provider Electricity - HYDRO - Seattle City Light
  Seattle City Light
- Electricity, AC, 2300-7650 V: 0.0378611 MWh; provider Electricity - HYDRO - Idaho Power Company
  Idaho Power Company
- Electricity, AC, 2300-7650 V: 0.0340279 MWh; provider Electricity - HYDRO - Midcontinent Independent System Operator, Inc.
  Midcontinent Independent System Operator, Inc.
- Electricity, AC, 2300-7650 V: 0.0323438 MWh; provider Electricity - HYDRO - ISO New England
  ISO New England
- Electricity, AC, 2300-7650 V: 0.0302522 MWh; provider Electricity - HYDRO - Western Area Power Administration - Desert Southwest Region
  Western Area Power Administration - Desert Southwest Region
- Electricity, AC, 2300-7650 V: 0.02916 MWh; provider Electricity - HYDRO - Public Utility District No. 2 of Grant County, Washington
  Public Utility District No. 2 of Grant County, Washington
- Electricity, AC, 2300-7650 V: 0.0283775 MWh; provider Electricity - HYDRO - Balancing Authority of Northern California
  Balancing Authority of Northern California
- Electricity, AC, 2300-7650 V: 0.027687 MWh; provider Electricity - HYDRO - Southwest Power Pool
  Southwest Power Pool
- Electricity, AC, 2300-7650 V: 0.0264634 MWh; provider Electricity - HYDRO - PJM Interconnection, LLC
  PJM Interconnection, LLC
- Electricity, AC, 2300-7650 V: 0.0248352 MWh; provider Electricity - HYDRO - Avista Corporation
  Avista Corporation
- Electricity, AC, 2300-7650 V: 0.0231587 MWh; provider Electricity - HYDRO - Public Utility District No. 1 of Chelan County
  Public Utility District No. 1 of Chelan County
- Electricity, AC, 2300-7650 V: 0.0213374 MWh; provider Electricity - HYDRO - Southern Company Services, Inc. - Trans
  Southern Company Services, Inc. - Trans
- Electricity, AC, 2300-7650 V: 0.0171381 MWh; provider Electricity - HYDRO - City of Tacoma, Department of Public Utilities, Light Division
  City of Tacoma, Department of Public Utilities, Light Division
- Electricity, AC, 2300-7650 V: 0.0135654 MWh; provider Electricity - HYDRO - PUD No. 1 of Douglas County
  PUD No. 1 of Douglas County
- Electricity, AC, 2300-7650 V: 0.012557 MWh; provider Electricity - HYDRO - NorthWestern Corporation
  NorthWestern Corporation
- Electricity, AC, 2300-7650 V: 0.00907147 MWh; provider Electricity - HYDRO - Portland General Electric Company
  Portland General Electric Company
- Electricity, AC, 2300-7650 V: 0.00735523 MWh; provider Electricity - HYDRO - Southwestern Power Administration
  Southwestern Power Administration
- Electricity, AC, 2300-7650 V: 0.00663902 MWh; provider Electricity - HYDRO - Southeastern Power Administration
  Southeastern Power Administration
- Electricity, AC, 2300-7650 V: 0.0056429 MWh; provider Electricity - HYDRO - Los Angeles Department of Water and Power
  Los Angeles Department of Water and Power
- Electricity, AC, 2300-7650 V: 0.00556484 MWh; provider Electricity - HYDRO - Duke Energy Carolinas
  Duke Energy Carolinas
- Electricity, AC, 2300-7650 V: 0.00553496 MWh; provider Electricity - HYDRO - Western Area Power Administration - Rocky Mountain Region
  Western Area Power Administration - Rocky Mountain Region
- Electricity, AC, 2300-7650 V: 0.0054511 MWh; provider Electricity - HYDRO - Puget Sound Energy, Inc.
  Puget Sound Energy, Inc.
- Electricity, AC, 2300-7650 V: 0.00276347 MWh; provider Electricity - HYDRO - Western Area Power Administration - Upper Great Plains West
  Western Area Power Administration - Upper Great Plains West
- Electricity, AC, 2300-7650 V: 0.00263511 MWh; provider Electricity - HYDRO - Turlock Irrigation District
  Turlock Irrigation District
- Electricity, AC, 2300-7650 V: 0.00262953 MWh; provider Electricity - HYDRO - Alcoa Power Generating, Inc. - Yadkin Division
  Alcoa Power Generating, Inc. - Yadkin Division
- Electricity, AC, 2300-7650 V: 0.00259668 MWh; provider Electricity - HYDRO - PacifiCorp East
  PacifiCorp East
- Electricity, AC, 2300-7650 V: 0.00254097 MWh; provider Electricity - HYDRO - South Carolina Public Service Authority
  South Carolina Public Service Authority
- Electricity, AC, 2300-7650 V: 0.00205769 MWh; provider Electricity - HYDRO - Duke Energy Progress East
  Duke Energy Progress East
- Electricity, AC, 2300-7650 V: 0.00193793 MWh; provider Electricity - HYDRO - Dominion Energy South Carolina, Inc.
  Dominion Energy South Carolina, Inc.
- Electricity, AC, 2300-7650 V: 0.00121963 MWh; provider Electricity - HYDRO - Electric Reliability Council of Texas, Inc.
  Electric Reliability Council of Texas, Inc.
- Electricity, AC, 2300-7650 V: 0.00111097 MWh; provider Electricity - HYDRO - Salt River Project Agricultural Improvement and Power District
  Salt River Project Agricultural Improvement and Power District
- Electricity, AC, 2300-7650 V: 0.00109869 MWh; provider Electricity - HYDRO - Louisville Gas and Electric Company and Kentucky Utilities Company
  Louisville Gas and Electric Company and Kentucky Utilities Company
- Electricity, AC, 2300-7650 V: 0.000812763 MWh; provider Electricity - HYDRO - Florida Power & Light Co.
  Florida Power & Light Co.
- Electricity, AC, 2300-7650 V: 0.000729824 MWh; provider Electricity - HYDRO - Public Service Company of Colorado
  Public Service Company of Colorado
- Electricity, AC, 2300-7650 V: 0.000594194 MWh; provider Electricity - HYDRO - Imperial Irrigation District
  Imperial Irrigation District
- Electricity, AC, 2300-7650 V: 0.000337216 MWh; provider Electricity - HYDRO - Nevada Power Company
  Nevada Power Company
- Electricity, AC, 2300-7650 V: 0.000115311 MWh; provider Electricity - HYDRO - Associated Electric Cooperative, Inc.
  Associated Electric Cooperative, Inc.

## Inventory method
Not applicable; this process contains only technosphere flows.

## Modelling constants
Provider weights are contribution = US_BA_weight × BA_resource_fraction, normalized within the resource so BA providers sum to 1.

## Completeness
This process contains no elementary flows. Provider weights sum to 1.

## Data selection
Balancing-authority resource shares are taken from the US Electricity Baseline process 'Electricity; at grid; consumption mix - US - US'.

## Data treatment
BA contributions are normalized within each resource to form a US-average provider mix.

## Sampling procedure
No uncertainty was assessed.

## Use advice
Use as an estimated US-average fuel-resource provider where regional data are unknown. Emissions and other elementary flows come from the linked balancing-authority resource processes, not from this mixer.

## Intended application
US-average fuel-resource mixer for use with the U.S. Electricity Baseline.

## Project
This dataset was developed by the Federal LCA Commons Data Curator Eastern Research Group, Inc. (ERG) under subcontract (SUB-2024-10066) to the National Renewable Energy Laboratory under Department of Energy (DOE) Prime Contract No. DE-AC36-08GO28308. The work is funded by DOE's Advanced Materials & Manufacturing Technologies Office (AMMTO).
